*Heading
** Job name: Cantilever Model name: Cantilever
** Generated by: Abaqus/CAE 2021
*Preprint, echo=NO, model=NO, history=NO, contact=NO
**
** PARTS
**
*Part, name=Part-1
*Node
      1,          10.,          10.,         100.
      2,          10.,           5.,         100.
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*Element, type=C3D8R
 1,  64,  65,  68,  67,   1,   2,   5,   4
 2,  65,  66,  69,  68,   2,   3,   6,   5
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*Nset, nset=ALL, generate
   1,  189,    1
*Elset, elset=ALL, generate
  1,  80,   1
*Nset, nset=FIXED_END
  61,  62,  63, 124, 125, 126, 187, 188, 189
*Elset, elset=FIXED_END
 39, 40, 79, 80
*Nset, nset=LOAD_END
   1,   2,   3,  64,  65,  66, 127, 128, 129
*Elset, elset=LOAD_END
  1,  2, 41, 42
*Nset, nset=TIP_NODES
   1,   2,   3,  64,  65,  66, 127, 128, 129
*Elset, elset=_LOAD_SURF_S3, internal
  1,  2, 41, 42
*Surface, type=ELEMENT, name=LOAD_SURF
_LOAD_SURF_S3, S3
** Section: Section-1
*Solid Section, elset=ALL, material=Steel
,
*End Part
**
**
** ASSEMBLY
**
*Assembly, name=Assembly
**
*Instance, name=Part-1-1, part=Part-1
*End Instance
**
*End Assembly
**
** MATERIALS
**
*Material, name=Steel
*Elastic
210000., 0.3
**
** BOUNDARY CONDITIONS
**
** Name: Fixed Type: Symmetry/Antisymmetry/Encastre
*Boundary
Part-1-1.FIXED_END, ENCASTRE
** ----------------------------------------------------------------
**
** STEP: Step-1
**
*Step, name=Step-1, nlgeom=NO
Static analysis
*Static
0.1, 1., 1e-05, 1.
**
** LOADS
**
** Name: Load-1   Type: Pressure
*Dsload
Part-1-1.LOAD_SURF, P, 1.
**
** OUTPUT REQUESTS
**
*Restart, write, frequency=0
**
** FIELD OUTPUT: F-Output-1
**
*Output, field
*Node Output
RF, U
*Element Output, directions=YES
E, S
**
** HISTORY OUTPUT: TIP
**
*Output, history
*Node Output, nset=Part-1-1.TIP_NODES
U1, U2, U3
**
** HISTORY OUTPUT: H-Output-1
**
*Output, history, variable=PRESELECT
*End Step
